// COMSOL Multiphysics 6.0.0.318 model "Axiel-B-example.mph"
// Outline of the model tree

Parameters
  rIN = 20[mm]
  rOUT = 100[mm]
  hHEIGHT = 100[mm]
  S = 10[mm]
  hS = 40[mm]
  wWIDTH = 10[mm]
  wDELTA = 20[mm]
  iCOIL = 0.5[A]
  nCOIL = 200

Geometry
  geom1 "Geometry 1" (2D axisymmetric, length unit mm)
    pol1: Polygon "Ploepiece"
      source = table
      table = 
        {rIN, 0}
        {rOUT, 0}
        {rOUT, hHEIGHT}
        {rIN, hHEIGHT}
        {rIN, hS + S}
        {rIN + wWIDTH, hS + S}
        {rIN + wWIDTH, hHEIGHT - wWIDTH}
        {rOUT - wWIDTH, hHEIGHT - wWIDTH}
        {rOUT - wWIDTH, wWIDTH}
        {rIN + wWIDTH, wWIDTH}
        {rIN + wWIDTH, hS}
        {rIN, hS}
    r1: Rectangle "Coil" | pos = {rIN + wWIDTH, wWIDTH}; size = {rOUT - rIN - 2 * wWIDTH, hHEIGHT - 2 * wWIDTH}
    r2: Rectangle "vaccum" | pos = {0, - wDELTA}; size = {rOUT + wDELTA, hHEIGHT + 2 * wDELTA}
    fin: Finalize "Form Union"

Materials
  mat1: Common "Perfect vacuum" on domains 1
    def "Basic"
      density = 0
      relpermeability = 1
      relpermittivity = 1
      electricconductivity = 0
  mat2: Common "Copper" on domains 3
    def "Basic"
      relpermeability = 1
      electricconductivity = 5.998e7[S/m]
      thermalexpansioncoefficient = 17e-6[1/K]
      heatcapacity = 385[J/(kg*K)]
      relpermittivity = 1
      density = 8960[kg/m^3]
      thermalconductivity = 400[W/(m*K)]
    Enu "Young's modulus and Poisson's ratio"
      E = 110e9[Pa]
      nu = 0.35
    linzRes "Linearized resistivity"
      rho0 = 1.72e-8[ohm*m]
      alpha = 0.0039[1/K]
      Tref = 298[K]
  mat3: Common "Iron" on domains 2
    def "Basic"
      relpermeability = 4000
      electricconductivity = 1.12e7[S/m]
      thermalexpansioncoefficient = 12.2e-6[1/K]
      heatcapacity = 440[J/(kg*K)]
      relpermittivity = 1
      density = 7870[kg/m^3]
      thermalconductivity = 76.2[W/(m*K)]
    Enu "Young's modulus and Poisson's ratio"
      E = 200e9[Pa]
      nu = 0.29

Physics
  mf: InductionCurrents "Magnetic Fields" on all domains
    dependent variable A = {Ar, Aphi, Az}
    al1: AmperesLaw "Ampère's Law 1" (default)
    axi1: AxialSymmetry (default)
    mi1: MagneticInsulation (default)
    init1: init "Initial Values 1" (default)
    coil1: Coil on domains 3 | ConductorModel = Multi; ICoil = iCOIL; N = nCOIL

Mesh
  mesh1 "Mesh 1" (physics-controlled)

Studies
  std1 "Study 1"
    stat: Stationary

Solver configurations
  sol1 "Solution 1" (study std1)
    v1: Variables "Dependent Variables 1"
    s1: Stationary "Stationary Solver 1"
      dDef: Direct
      fc1: FullyCoupled | linsolver = dDef

Datasets
  dset1: Solution | solution = sol1
  rev1: Revolve2D "Revolution 2D 1" | data = dset1; startangle = -90; revangle = 225
  cln1: CutLine2D "Axiel" | data = dset1; genpoints = {{0, hHEIGHT + wDELTA}, {0, - wDELTA}}

Plots
  pg1: PlotGroup2D "Magnetic Flux Density Norm (mf)" | data = dset1; dataisaxisym = on
    surf1: Surface | expr = mf.normB
    str1: Streamline on boundaries 1-17 | expr = {mf.Br, mf.Bz}; udist = 0.03
      col1: Color "Color Expression 1" | expr = mf.normB
      filt1: Filter | expr = !isScalingSystemDomain
    con1: Contour | expr = r*mf.Aphi; levelrounding = off
      filt1: Filter | expr = !isScalingSystemDomain
  pg2: PlotGroup3D "Magnetic Flux Density Norm, Revolved Geometry (mf)" | data = rev1
    vol1: Volume | expr = mf.normB
    con1: Contour | expr = r*mf.Aphi; levelrounding = off
      filt1: Filter | expr = !isScalingSystemDomain

Exports
  data1: Data "B on Axiel"
    data = cln1
    expr = {mf.Bz, mf.Mr, mf.normB}
    unit = {T, A/m, T}
    descr = {"Magnetic flux density, z component", "Magnetization, r component", Magnetic flux density norm}
    separator = ,