// COMSOL Multiphysics 6.0.0.318 model "static-plate.mph"
// Outline of the model tree

Parameters
  a = 12[mm]
  b = 8[mm]
  r = 0.5[mm]
  R = 1[mm]
  d = 5[mm]
  Fx = 400[N/m]

Geometry
  geom1 "Geometry 1" (2D, length unit mm)
    r1: Rectangle | size = {a, b}
    c1: Circle | pos = {0, b/4}; r = r
    c2: Circle | pos = {0, b/2}; r = r
    c3: Circle | pos = {0, 3*b/4}; r = r
    c4: Circle | pos = {a, 2*b/3}; r = r
    c5: Circle | pos = {a, b/3}; r = r
    c6: Circle | pos = {a/3, b/2}; r = R
    c7: Circle | pos = {2*a/3, b/2}; r = R
    r2: Rectangle | pos = {a/3, b/2-R}; size = {a/3, 2*R}
    dif1: Difference | input = r1; input2 = c1, c2, c3, c4, c5, c6, c7, r2
    fin: Finalize "Form Union"

Materials
  mat1: Common "Iron" on all domains
    def "Basic"
      relpermeability = 4000
      electricconductivity = 1.12e7[S/m]
      thermalexpansioncoefficient = 12.2e-6[1/K]
      heatcapacity = 440[J/(kg*K)]
      relpermittivity = 1
      density = 7870[kg/m^3]
      thermalconductivity = 76.2[W/(m*K)]
    Enu "Young's modulus and Poisson's ratio"
      E = 200e9[Pa]
      nu = 0.29

Physics
  plate: Plate on all domains
    dependent variable u = {u, v, w}
    emm1: Elastic "Linear Elastic Material 1" (default)
      shls1: ShellLocalSystem (default)
    to1: ThicknessOffset "Thickness and Offset 1" (default) | d = d
    free1: Free (default)
    init1: init "Initial Values 1" (default)
    fix1: Fixed "Fixed Constraint 1" on boundaries 1, 3-5
    el1: EdgeLoad on boundaries 10 | FeperLength = {Fx, 0, 0}

Mesh
  mesh1 "Mesh 1" (physics-controlled)

Studies
  std1 "Study 1"
    stat: Stationary

Solver configurations
  sol1 "Solution 1" (study std1)
    v1: Variables "Dependent Variables 1"
    s1: Stationary "Stationary Solver 1"
      dDef: Direct
      fc1: FullyCoupled | linsolver = dDef

Datasets
  dset1: Solution | solution = sol1
  emb1: Embed2D | data = dset1

Plots
  pg1: PlotGroup3D "Stress (plate)" | data = emb1
    surf1: Surface | expr = plate.misesGp; descr = von Mises Stress, Gauss Point Evaluation
      def: Deform "Deformation" | expr = {plate.u, plate.v, plate.w}
  pg2: PlotGroup3D "Thickness and Orientation (plate)" | data = emb1
    surf1: Surface "Thickness" | expr = plate.d
    syss: CoordSysSurface "Shell Local System" | sys = platesys
  pg3: PlotGroup3D "Edge Loads (plate)" | data = emb1
    arwl1: ArrowLine "Edge Load 1" | expr = {plate.el1.F_Lx, plate.el1.F_Ly, plate.el1.F_Lz}
      col: Color "Color Expression" | expr = plate.el1.F_L_Mag
      def: Deform "Deformation" | expr = {u, v, w}; descr = Displacement field
    surf1: Surface "Gray Surfaces" | expr = 1
      def: Deform "Deformation" | expr = {u, v, w}; descr = Displacement field
      tran1: Transparency | transparency = 0.8